**
*Heading
	 Simple model for testing permanent strain calculations
*Preprint, echo=NO, model=NO, history=NO, contact=NO
**
** ----------------------------------------------------------------
**   Create Geometry
*Node, nset=all_nodes
	1,	    0.,	    0.,	    0.
	2,	    2.0,	0.,	    0.
	3,	    2.0,	2.0,	0.
	4,	    0.,	    2.0,	0.
	5,	    0.,	    0.,	    1.0
	6,	    2.0,	0.,	    1.0
	7,	    2.0,	2.0,	1.0
	8,	    0.,	    2.0,	1.0
	9,	    1.0,    0.,	    0.
	10,	    2.0,	1.0,    0.
	11,	    1.0,	2.0,	0.
	12,	    0.,	    1.0,	0.
	13,	    1.0,    0.,	    1.0
	14,	    2.0,	1.0,    1.0
	15,	    1.0,	2.0,	1.0
	16,	    0.,	    1.0,	1.0
    17,	    0.,	    0.,	    0.5
	18,	    2.0,	0.,	    0.5
	19,	    2.0,	2.0,	0.5
	20,	    0.,	    2.0,	0.5
	21,	    0.,	    0.,	    2.0
	22,	    1.0,	0.,	    2.0
	23,	    1.0,	1.0,	2.0
	24,	    0.,	    1.0,	2.0
	25,	    0.5,    0.,	    2.0
	26,	    1.0,	0.5,    2.0
	27,	    0.5,	1.0,	2.0
	28,	    0.,	    0.5,	2.0
    29,	    0.,	    0.,	    1.5
	30,	    1.5,	0.,	    1.5
	31,	    1.5,	1.5,	1.5
	32,	    0.,	    1.5,	1.5
*Element, type=C3D20, elset=all_elements
	1,  1,  2,  3,  4,  5,  6,  7,  8,  9,  10, 11, 12, 13, 14, 15,
	    16, 17, 18, 19, 20
	2,  5,  6,  7,  8,  21, 22, 23, 24, 13, 14, 15, 16, 25, 26, 27,
	    28, 29, 30, 31, 32
**
*Nset, nset=x0_nodes
    1, 4, 12
*Nset, nset=y0_nodes
    1, 2, 9
*Nset, nset=z0_nodes
    1, 2, 3, 4, 9, 10, 11, 12
*Nset, nset=disp_nodes
    6
*Solid Section, elset=all_Elements, material=ballast
	1.0
*Material, name=ballast
    *Elastic
        2e8, 0.35
*Boundary
    x0_nodes, 1, 1
    y0_nodes, 2, 2
    z0_nodes, 3, 3
*Step, name=loading
    *Static
        1., 1., 1., 1.
    *CLoad
        7, 1,  1e6
        23, 3,  -1e6
    *Boundary
        disp_nodes, 1, 1, 0.01
    *Output, Field
        *Node output
            CF, RF, U
        *Element Output
            S, E, EVOL, COORD
*End step
